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/batch
! ANSYS input file written by Workbench version 18.2 RELEASE
! File used for geometry attach: C:\Users\Khan\AppData\Local\Temp\WB_DESKTOP-I12BF91_Khan_3836_2\unsaved_project_files\dp0\SYS\DM\SYS.agdb
/title,Simple Cube--Static Structural (A5)
/com,--- Data in consistent NMM units. See Solving Units in the help system for more information.
/units,MPA
/prep7
! Turn off shape checking because checks already performed inside WB mesher.
! See help system for more information.
SHPP,OFF,,NOWARN
etcon,set             ! allow ANSYS to choose best KEYOP's for 180x elements
/com,*********** Nodes for the whole assembly ***********
nblock,3,,2416
(1i9,3e20.9e3)
        1    4.583333333E+001    4.166666667E+000   -4.166666667E+000
        2    4.583333333E+001    8.333333333E+000   -4.166666667E+000
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-1
/com,*********** Elements for Body 1 "Solid" ***********
et,1,185
eblock,19,solid,,1728
(19i9)
        1        1        1        1        0        0        0        0        8        0        1        1     1932     1911     1778     1452     2043     1910     1909
        1        1        1        1        0        0        0        0        8        0        2        1     1778     1911     1932        2     1789     1912     1943
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-1
/com,*********** Send User Defined Coordinate System(s) ***********
csys,0
toffst,273.15,  ! Temperature offset from absolute zero
/com,*********** Set Reference Temperature ***********
tref,22.
/com,*********** Send Materials ***********
MP,DENS,1,7.85e-09,	! tonne mm^-3
MP,ALPX,1,1.2e-05,	! C^-1
MP,C,1,434000000,	! mm^2 s^-2 C^-1
MP,KXX,1,60.5,	! tonne mm s^-3 C^-1
MP,RSVX,1,0.00017,	! ohm mm
MP,EX,1,200000,	! tonne s^-2 mm^-1
MP,NUXY,1,0.3,
MP,MURX,1,10000,

!************************* Model Summary ********************
!Solid,	Structural Steel,	matid,	1
!************************* End Model Summary ********************
/com,*********** Fixed Supports ***********
CMBLOCK,_FIXEDSU,NODE,      169
(8i10)
      1332      1333      1334      1335      1336      1337      1338      1339
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cmsel,s,_FIXEDSU
d,all,all
nsel,all
/com,*********** Define Force Using Surface Effect Elements ***********
local,12,0,0.,0.,0.,-0.,0.,0.
csys,0
et,2,154
eblock,10,,,144
(15i9)
     1729        2        2        2       12     1596     1453     1598     1597
     1730        2        2        2       12     1595     1464     1453     1596
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-1
esel,s,type,,2
keyop,2,2,1                ! Apply load in local coordinate system
keyop,2,7,1                ! Use original area so load is constant in large deformation
keyop,2,11,2               ! Use real and not project area
esel,all

*DIM,_loadvari27x,TABLE,2,1,1,TIME,
! Time values
_loadvari27x(1,0,1) = 0.
_loadvari27x(2,0,1) = 1.
! Load values
_loadvari27x(1,1,1) = 0.
_loadvari27x(2,1,1) = 0.


*DIM,_loadvari27y,TABLE,2,1,1,TIME,
! Time values
_loadvari27y(1,0,1) = 0.
_loadvari27y(2,0,1) = 1.
! Load values
_loadvari27y(1,1,1) = 0.
_loadvari27y(2,1,1) = -0.4


*DIM,_loadvari27z,TABLE,2,1,1,TIME,
! Time values
_loadvari27z(1,0,1) = 0.
_loadvari27z(2,0,1) = 1.
! Load values
_loadvari27z(1,1,1) = 0.
_loadvari27z(2,1,1) = 0.

fini
/com,****************************************************************************
/com,*************************    SOLUTION       ********************************
/com,****************************************************************************
/solu
antype,0                   ! static analysis
eqsl,pcg,1e-8,,,,,,1
cntr,print,1               ! print out contact info and also make no initial contact an error
dmpoption,emat,no             ! Don't combine emat file for DANSYS
dmpoption,esav,no             ! Don't combine esav file for DANSYS
nldiag,cont,iter           ! print out contact info each equilibrium iteration
rescontrol,,none                 ! Do not keep any restart files
/com,****************************************************
/com,******************* SOLVE FOR LS 1 OF 1 ****************
esel,s,type,,2
nsle
sfe,all,1,pres,1,%_loadvari27x%
sfe,all,2,pres,1,%_loadvari27y%
sfe,all,3,pres,1,%_loadvari27z%
nsel,all
esel,all
nsub,1,1,1
time,1.
outres,erase
outres,all,none
outres,nsol,all
outres,rsol,all
outres,strs,all
outres,epel,all
outres,eppl,all
outres,misc,all
stabilize,off                   ! Stabilization turned OFF by user
! *********** WB SOLVE COMMAND ***********
! check interactive state
*get,ANSINTER_,active,,int
*if,ANSINTER_,ne,0,then
/eof
*endif
solve
/com *************** Write FE CONNECTORS *********
CEWRITE,file,ce,,INTE
/com,****************************************************
/com,*************** FINISHED SOLVE FOR LS 1 *************
*get,_PCGITER,active,,solu,cgiter
/post1
! ****** Begin Command Snippet ******
set, first
/efacet,2
*get,my_nodeCount,NODE,0,COUNT
/output,nodalSolution,txt
/format,,ES,15,5,my_nodeCount*4
prnsol, s, comp


! ****** End   Command Snippet ******
! ****** Begin Command Snippet ******

SET,LAST
*get,my_maxNode,NODE,0,NUM,MAX
*get,my_minNode,NODE,0,NUM,MIN
*cfopen,nodeInfo,txt
*vwrite,my_minNode
(ES15.7)
*vwrite,my_maxNode
(ES15.7)
*cfclos


! ****** End   Command Snippet ******
fini
