/com,*********** Nodes for the whole assembly ***********
nblock,3,,745
(1i9,3e20.9e3)
        1    0.000000000E+000    0.400000000E+002    0.200000000E+002
        2    0.000000000E+000    0.400000000E+002    0.150000000E+002
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-1
/com,*********** Elements for Body 1 "Solid" ***********
et,1,185
eblock,19,solid,,480
(19i9)
        1        1        1        1        0        0        0        0        8        0        1      445      490      485      440      444      489      484      439
        1        1        1        1        0        0        0        0        8        0        2      444      489      484      439      443      488      483      438
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-1
